new TCC_Curve.100T_CLEARING npts=10 c_array=( 289.172,  67.917,  24.973,  9.9585,  2.9772,  0.9713,  0.2907,  0.1258,  0.0543,  0.0219) t_array=( 248.5639,  294.7896,  353.2669,  446.8695,  671.0952,  1064.9424,  1873.1975,  2994.2445,  4989.509,  9498.2211)
new TCC_Curve.100T_MELTING npts=11 c_array=( 317.8765,  105.3376,  30.2397,  10.8112,  4.7048,  2.0904,  0.7206,  0.2576,  0.0821,  0.0344,  0.0137) t_array=( 196.9082,  221.4637,  271.2555,  340.285,  443.628,  609.8603,  969.7855,  1660.312,  2932.6068,  4431.6688,  6966.9752)
new TCC_Curve.10T_CLEARING npts=10 c_array=( 291.2849,  59.4517,  19.4163,  9.2785,  2.8917,  0.7783,  0.194,  0.064,  0.0232,  0.0134) t_array=( 23.4989,  26.9288,  32.9489,  39.8149,  58.806,  97.4842,  194.8709,  394.4393,  788.4845,  1236.9916)
new TCC_Curve.10T_MELTING npts=12 c_array=( 313.6076,  79.136,  32.5911,  13.7471,  6.14,  2.9402,  1.345,  0.5685,  0.2207,  0.0831,  0.0283,  0.0143) t_array=( 19.6295,  20.2727,  23.2316,  27.9852,  35.3267,  44.409,  61.2403,  91.3017,  145.9427,  236.9525,  405.6722,  584.4022)
new TCC_Curve.12T_CLEARING npts=10 c_array=( 284.9921,  58.8978,  14.5412,  5.9762,  1.9681,  0.5902,  0.1589,  0.0651,  0.0249,  0.0134) t_array=( 30.4132,  35.6218,  45.484,  59.5445,  89.051,  147.3152,  296.0185,  510.4986,  981.9644,  1663.7691)
new TCC_Curve.12T_MELTING npts=11 c_array=( 320.5322,  84.3191,  30.1769,  11.6519,  6.6519,  3.0114,  1.0446,  0.3192,  0.1008,  0.0339,  0.0141) t_array=( 24.6761,  27.1538,  31.3445,  37.9549,  44.3167,  60.1045,  94.4896,  167.0705,  295.0964,  500.5101,  773.0568)
new TCC_Curve.15T_CLEARING npts=10 c_array=( 287.3732,  70.3615,  27.9416,  10.1678,  3.5566,  1.0711,  0.3269,  0.1033,  0.0363,  0.0134) t_array=( 38.3916,  44.8732,  50.9968,  65.1834,  92.0645,  144.8841,  254.3167,  501.5522,  980.9437,  2042.0777)
new TCC_Curve.15T_MELTING npts=11 c_array=( 315.8991,  63.5435,  16.6637,  5.8592,  2.1433,  0.9298,  0.4819,  0.2293,  0.0583,  0.0252,  0.0142) t_array=( 30.4765,  35.5109,  44.5014,  59.4826,  87.3086,  125.1224,  173.8054,  252.2095,  502.5966,  769.0473,  1020.4873)
new TCC_Curve.20T_CLEARING npts=11 c_array=( 285.8827,  78.3172,  29.9892,  11.7614,  3.967,  1.9477,  0.6992,  0.2305,  0.0645,  0.028,  0.0131) t_array=( 50.4167,  55.9425,  65.4552,  79.2595,  112.4121,  147.6219,  228.0076,  403.5682,  856.8935,  1515.1047,  2758.0697)
new TCC_Curve.20T_MELTING npts=11 c_array=( 318.2072,  50.548,  19.0959,  8.672,  4.0842,  1.5478,  0.7102,  0.2054,  0.1005,  0.0336,  0.014) t_array=( 39.8149,  45.7688,  54.1676,  67.8111,  88.038,  132.0754,  188.8848,  347.7987,  495.8471,  841.8766,  1273.5428)
new TCC_Curve.25T_CLEARING npts=10 c_array=( 284.9921,  39.7942,  10.7105,  3.9794,  1.0115,  0.3825,  0.1324,  0.067,  0.0272,  0.0134) t_array=( 63.2468,  78.4395,  105.3924,  145.4881,  244.2079,  390.7645,  696.6975,  1072.7235,  1962.9479,  3392.2496)
new TCC_Curve.25T_MELTING npts=10 c_array=( 312.956,  78.2358,  30.8432,  10.4356,  4.08,  1.0242,  0.2349,  0.0588,  0.0241,  0.0137) t_array=( 49.688,  56.059,  63.9745,  82.3689,  111.9454,  193.6587,  406.5169,  818.5652,  1274.868,  1646.5553)
new TCC_Curve.30T_CLEARING npts=10 c_array=( 284.9921,  57.267,  18.8394,  5.8228,  2.8707,  0.9713,  0.2907,  0.0894,  0.0291,  0.0133) t_array=( 78.6846,  91.3967,  112.7634,  159.9299,  205.2724,  323.0422,  572.372,  1144.1723,  2364.6012,  4422.4604)
new TCC_Curve.30T_MELTING npts=11 c_array=( 320.8658,  88.0838,  31.8538,  12.3892,  6.0011,  2.7224,  1.1235,  0.2067,  0.0719,  0.0304,  0.0141) t_array=( 61.9449,  69.3805,  78.2765,  95.5768,  121.1528,  163.6313,  245.9922,  569.4034,  968.7775,  1445.8307,  2115.5782)
new TCC_Curve.40T_CLEARING npts=10 c_array=( 290.3775,  109.1291,  38.2521,  14.2123,  3.4188,  0.9969,  0.1734,  0.0577,  0.0254,  0.0131) t_array=( 99.4296,  109.7551,  125.644,  152.4589,  246.7609,  409.0615,  967.7705,  1914.5586,  3308.6261,  5682.2026)
new TCC_Curve.40T_MELTING npts=10 c_array=( 316.5568,  105.997,  30.8432,  10.3277,  3.2153,  1.021,  0.4325,  0.1131,  0.0407,  0.0137) t_array=( 78.1139,  87.0366,  102.3676,  134.152,  195.6833,  326.4194,  492.2504,  964.7557,  1624.4435,  2769.5673)
new TCC_Curve.50T_CLEARING npts=9 c_array=( 288.5712,  57.5057,  19.4972,  5.0025,  1.1142,  0.2598,  0.097,  0.0392,  0.0135) t_array=( 120.7754,  147.7755,  183.4637,  275.807,  495.3317,  962.7511,  1704.0467,  2991.1321,  6816.4644)
new TCC_Curve.50T_MELTING npts=10 c_array=( 315.5707,  91.8254,  36.7317,  14.5412,  5.8898,  2.0991,  0.4951,  0.0991,  0.0368,  0.0142) t_array=( 98.8111,  109.7551,  124.2148,  153.2537,  203.7835,  301.2987,  591.7413,  1278.8518,  2093.69,  3325.876)
new TCC_Curve.65T_CLEARING npts=9 c_array=( 288.2712,  67.917,  14.4208,  4.0085,  1.2059,  0.3809,  0.0992,  0.0342,  0.0134) t_array=( 154.0527,  184.9965,  250.6406,  383.5173,  591.7413,  1019.4265,  2155.5553,  4304.4781,  9073.3726)
new TCC_Curve.65T_MELTING npts=10 c_array=( 316.5568,  104.9003,  36.2384,  15.6882,  6.1848,  2.0538,  0.6121,  0.2052,  0.051,  0.0141) t_array=( 125.3829,  139.2699,  161.6018,  193.8602,  252.472,  381.9252,  665.5347,  1144.1723,  2354.7848,  4440.8964)
new TCC_Curve.6T_CLEARING npts=11 c_array=( 282.9249,  59.7617,  18.7612,  5.6557,  1.8223,  0.4956,  0.1457,  0.0655,  0.0358,  0.0185,  0.0134) t_array=( 14.8083,  16.177,  18.987,  25.8315,  39.4029,  67.1793,  128.4183,  198.7599,  304.1321,  475.1484,  623.3263)
new TCC_Curve.6T_MELTING npts=10 c_array=( 317.2159,  52.6951,  15.0646,  5.2367,  1.9215,  0.6191,  0.2037,  0.0604,  0.0254,  0.0137) t_array=( 11.9402,  12.8552,  15.4053,  20.4846,  29.3566,  49.5332,  84.8028,  152.4589,  236.4601,  318.0418)
new TCC_Curve.80T_CLEARING npts=9 c_array=( 285.5855,  57.9862,  14.6475,  4.9456,  1.0295,  0.304,  0.0997,  0.0387,  0.0169) t_array=( 194.466,  239.4297,  313.1188,  439.495,  808.4129,  1447.3351,  2690.0796,  5046.9174,  9409.7316)
new TCC_Curve.80T_MELTING npts=10 c_array=( 322.8743,  78.9715,  26.3607,  9.1349,  3.192,  0.9474,  0.3072,  0.0758,  0.0266,  0.0137) t_array=( 158.1107,  179.1273,  213.7695,  280.4348,  407.3633,  688.7726,  1177.9808,  2352.337,  3903.583,  5332.9163)
new TCC_Curve.8T_CLEARING npts=11 c_array=( 287.9716,  59.3899,  19.907,  8.4671,  3.0303,  1.2454,  0.4298,  0.1987,  0.0676,  0.028,  0.0134) t_array=( 18.8296,  20.7634,  24.3954,  30.4765,  41.9837,  59.9796,  95.3782,  147.1621,  281.6039,  514.2287,  910.1726)
new TCC_Curve.8T_MELTING npts=11 c_array=( 323.5465,  83.7946,  31.7546,  14.7086,  5.4422,  2.1079,  0.7497,  0.3049,  0.1222,  0.0444,  0.0138) t_array=( 15.3094,  16.043,  18.1566,  20.5059,  27.3806,  39.8149,  62.0093,  93.9995,  148.2373,  243.7005,  430.8957)
new TCC_Curve.SF0_2_CLEARING npts=18 c_array=( 299.8919,  169.9622,  86.0018,  48.7411,  24.1807,  7.2516,  5.5105,  4.4803,  3.3659,  2.4561,  1.7608,  0.8353,  0.2844,  0.0743,  0.0239,  0.0178,  0.0146,  0.0123) t_array=( 0.7501,  0.8203,  1.0016,  1.2267,  1.8557,  4.0231,  4.9328,  5.234,  5.4962,  5.7536,  6.4308,  8.1771,  13.235,  26.9008,  66.1395,  95.279,  130.709,  189.8695)
new TCC_Curve.SF0_2_MELTING npts=15 c_array=( 299.8919,  199.9001,  100.0,  53.025,  44.2476,  12.5448,  7.8317,  5.7926,  4.7589,  3.4331,  2.5791,  2.1299,  1.221,  0.1851,  0.0122) t_array=( 0.6201,  0.6697,  0.8,  0.9995,  1.1056,  2.4727,  3.3537,  4.1119,  4.4317,  4.7663,  4.9533,  5.1799,  6.1113,  14.0872,  52.1228)
new TCC_Curve.SF0_3_CLEARING npts=20 c_array=( 301.1421,  185.6711,  111.3069,  71.8404,  41.5709,  20.9914,  7.6466,  5.5855,  4.6031,  3.7077,  2.8381,  2.2436,  1.6961,  0.7029,  0.1575,  0.0499,  0.0277,  0.018,  0.014,  0.0119) t_array=( 1.1513,  1.263,  1.3985,  1.6076,  2.0063,  3.0763,  5.9669,  7.2932,  8.0338,  8.6765,  8.9888,  9.4195,  10.0888,  14.5488,  29.174,  57.1777,  92.6408,  141.6068,  194.466,  255.6426)
new TCC_Curve.SF0_3_MELTING npts=16 c_array=( 317.2159,  233.892,  137.9007,  72.5914,  41.2694,  11.8351,  7.8317,  6.3676,  5.0443,  4.0043,  2.5445,  2.0032,  1.2702,  0.4021,  0.0769,  0.0119) t_array=( 1.0099,  1.0247,  1.1382,  1.4058,  1.8289,  3.9939,  5.3887,  5.844,  6.5251,  7.2177,  7.9839,  8.3403,  9.7586,  16.2275,  34.0285,  88.038)
new TCC_Curve.SF0_4_CLEARING npts=18 c_array=( 307.4715,  209.4779,  143.0128,  84.0564,  51.7179,  31.5899,  9.2689,  6.7846,  4.9714,  3.394,  2.413,  1.4878,  0.6335,  0.1582,  0.0709,  0.026,  0.0156,  0.0118) t_array=( 1.4368,  1.5246,  1.6934,  1.9773,  2.4294,  3.0859,  7.0471,  8.4188,  9.8914,  10.5722,  10.9755,  12.9222,  18.0249,  33.1897,  51.8525,  110.4421,  190.661,  300.3601)
new TCC_Curve.SF0_4_MELTING npts=16 c_array=( 329.3178,  184.3243,  113.7646,  71.1711,  45.8402,  27.4234,  8.8084,  7.3503,  5.6733,  4.2268,  3.1557,  2.5953,  1.9156,  1.2676,  0.1851,  0.012) t_array=( 1.2499,  1.3697,  1.5583,  1.7857,  2.2077,  3.0005,  6.3709,  7.1579,  8.1094,  8.7855,  8.9888,  9.449,  10.1943,  11.5253,  26.9849,  99.5331)
new TCC_Curve.SF0_6_CLEARING npts=17 c_array=( 307.7914,  198.0377,  121.3419,  72.894,  38.7325,  15.1905,  6.5762,  4.5084,  3.2355,  1.5333,  1.0436,  0.3647,  0.0835,  0.0326,  0.0173,  0.0133,  0.0119) t_array=( 2.2216,  2.3918,  2.6265,  3.0795,  4.1549,  7.4156,  12.9761,  15.3573,  17.1828,  18.4612,  19.386,  27.0129,  53.2737,  96.9786,  174.8933,  250.6406,  309.8792)
new TCC_Curve.SF0_6_MELTING npts=17 c_array=( 319.8662,  189.1797,  152.2212,  91.4442,  53.1354,  26.7474,  11.1076,  6.7144,  5.1826,  3.967,  2.9989,  1.8703,  1.3132,  0.7856,  0.4551,  0.0747,  0.0123) t_array=( 1.9026,  2.0378,  2.1781,  2.5352,  3.1052,  4.5295,  8.1686,  11.1945,  12.7487,  14.4734,  15.3573,  15.5987,  16.2952,  18.2512,  21.578,  45.9118,  113.5873)
new TCC_Curve.SF0_7_CLEARING npts=19 c_array=( 305.8768,  206.2354,  117.4922,  72.2901,  39.3415,  10.7105,  7.5439,  5.3579,  3.8452,  2.9865,  1.5607,  1.2363,  0.9513,  0.4935,  0.1559,  0.0487,  0.0181,  0.014,  0.0118) t_array=( 2.4421,  2.6374,  3.0067,  3.5107,  4.6151,  10.2688,  13.4013,  15.91,  18.1566,  19.0859,  19.876,  20.3572,  21.5556,  26.512,  41.6358,  78.5211,  178.1982,  234.0137,  322.371)
new TCC_Curve.SF0_7_MELTING npts=15 c_array=( 313.2817,  184.7081,  115.5533,  68.4844,  44.6173,  26.1423,  7.9797,  6.0261,  4.6464,  3.2932,  2.022,  1.3366,  0.8854,  0.2339,  0.0122) t_array=( 2.0872,  2.2471,  2.5064,  3.0445,  3.6904,  5.0574,  11.1018,  12.7354,  14.6551,  15.8935,  16.6897,  17.1293,  18.4804,  29.8492,  121.0268)
new TCC_Curve.SF10_4_CLEARING npts=16 c_array=( 296.1725,  192.354,  61.5916,  15.77,  7.184,  3.8173,  2.731,  1.8879,  0.9308,  0.3146,  0.1229,  0.0465,  0.0247,  0.017,  0.0132,  0.0114) t_array=( 32.9832,  35.8076,  50.4692,  91.3967,  132.2129,  178.013,  205.9139,  235.7235,  260.7444,  361.819,  538.8669,  929.3027,  1516.6812,  2175.8262,  3022.4025,  3748.4199)
new TCC_Curve.SF10_4_MELTING npts=13 c_array=( 312.3057,  219.2864,  140.5065,  83.9691,  18.7807,  6.3214,  3.6238,  2.2436,  1.2849,  0.6535,  0.2052,  0.0502,  0.0117) t_array=( 29.1133,  29.6635,  32.778,  38.9142,  72.4029,  118.7823,  154.8559,  186.5421,  209.369,  243.4472,  368.6562,  697.4225,  1439.8284)
new TCC_Curve.SF14_0_CLEARING npts=14 c_array=( 300.8291,  101.7837,  45.0369,  22.9554,  13.037,  8.0548,  4.7244,  2.9159,  0.4411,  0.1061,  0.0405,  0.0211,  0.0146,  0.0115) t_array=( 50.6269,  61.113,  76.6652,  99.948,  138.8361,  169.6972,  202.3053,  229.4349,  369.4238,  666.2273,  1122.9524,  1904.6286,  2772.4492,  3721.2302)
new TCC_Curve.SF14_0_MELTING npts=14 c_array=( 308.4323,  202.4105,  107.1051,  56.0298,  19.477,  13.8044,  10.0104,  6.5557,  4.3292,  2.4231,  1.3992,  0.5065,  0.0722,  0.0117) t_array=( 43.4948,  45.5788,  50.7851,  61.8805,  97.7888,  116.4581,  134.4313,  156.1497,  175.9881,  205.486,  228.2449,  301.6122,  664.1519,  1629.5197)
new TCC_Curve.SF1_0_CLEARING npts=17 c_array=( 306.8326,  199.0702,  119.9617,  63.0826,  31.9866,  13.3665,  6.4543,  5.0129,  3.7348,  1.6389,  0.8928,  0.4222,  0.0962,  0.0288,  0.017,  0.0134,  0.0118) t_array=( 3.5437,  3.8153,  4.3631,  5.3218,  7.316,  13.4152,  20.5272,  23.6214,  24.986,  26.4844,  29.5711,  37.5232,  72.2525,  157.7821,  255.6426,  355.8481,  454.3677)
new TCC_Curve.SF1_0_MELTING npts=15 c_array=( 320.5322,  172.2757,  88.543,  42.0492,  24.3068,  8.2755,  6.3346,  4.9662,  3.1689,  1.5558,  1.2389,  0.9059,  0.3696,  0.0417,  0.0122) t_array=( 3.0956,  3.3572,  4.1377,  5.571,  8.0088,  15.7782,  18.3655,  20.4208,  21.5556,  22.4478,  23.4989,  25.6708,  34.42,  91.0173,  169.6972)
new TCC_Curve.SF1_3_CLEARING npts=17 c_array=( 304.607,  212.9928,  145.1103,  80.7153,  49.5074,  20.1151,  7.4814,  5.4991,  4.2577,  2.286,  1.4526,  0.7036,  0.1369,  0.0347,  0.0193,  0.014,  0.0116) t_array=( 4.5531,  4.7121,  5.0469,  5.8928,  7.1431,  11.7187,  22.2387,  25.7778,  27.4376,  28.6627,  31.2793,  37.5232,  69.7422,  155.8252,  258.584,  364.4627,  503.6431)
new TCC_Curve.SF1_3_MELTING npts=15 c_array=( 320.1991,  177.5507,  111.6547,  62.3002,  40.0433,  26.2786,  6.9706,  5.4083,  4.2137,  1.7408,  1.4617,  1.1591,  0.8618,  0.1514,  0.0121) t_array=( 3.9321,  4.1463,  4.6779,  5.7536,  6.9742,  8.7581,  20.7634,  22.9913,  24.2941,  25.3261,  26.1016,  27.4376,  29.9113,  57.7154,  189.0813)
new TCC_Curve.SF1_4_CLEARING npts=17 c_array=( 302.0831,  194.7696,  107.2166,  58.2279,  30.9396,  9.1065,  6.5831,  5.3635,  4.3067,  2.0991,  1.4632,  0.9031,  0.2794,  0.0697,  0.0257,  0.0162,  0.0118) t_array=( 4.9276,  5.0838,  5.9545,  7.2252,  9.9223,  20.9587,  25.221,  27.6381,  29.0831,  30.6673,  33.2242,  36.5982,  54.5634,  105.7218,  210.6796,  341.7036,  574.7581)
new TCC_Curve.SF1_4_MELTING npts=16 c_array=( 313.6076,  203.8895,  142.1232,  94.5387,  64.0078,  39.4234,  7.5126,  6.1081,  5.3246,  4.271,  2.2647,  1.7498,  1.1483,  0.7102,  0.0483,  0.012) t_array=( 4.1766,  4.3813,  4.6731,  5.3108,  5.9606,  7.4853,  21.4884,  23.2075,  24.3447,  25.3524,  25.7778,  26.8449,  29.6327,  33.328,  102.6875,  210.2418)
new TCC_Curve.SF1_6_CLEARING npts=16 c_array=( 300.204,  212.7714,  88.8197,  42.2684,  15.4293,  6.4008,  5.2586,  3.8133,  1.7228,  0.9483,  0.5008,  0.1511,  0.0442,  0.0234,  0.016,  0.0115) t_array=( 5.8319,  6.0104,  7.5009,  9.9948,  18.6154,  31.8042,  35.2166,  37.135,  39.5672,  44.78,  52.1771,  87.1272,  164.1426,  266.5018,  398.9776,  626.5761)
new TCC_Curve.SF1_6_MELTING npts=16 c_array=( 319.5337,  217.4695,  138.9083,  74.6587,  41.6142,  11.3057,  7.7992,  5.7685,  4.2844,  3.159,  1.3506,  1.036,  0.6481,  0.3893,  0.0643,  0.0119) t_array=( 4.7663,  5.0574,  5.6176,  6.8236,  8.7399,  19.8553,  24.8823,  29.2651,  31.6063,  32.3378,  35.2166,  36.5982,  41.3768,  48.8172,  107.1608,  248.8226)
new TCC_Curve.SF21_0_CLEARING npts=17 c_array=( 297.7166,  149.7092,  72.8183,  37.8958,  16.8204,  10.7664,  6.82,  4.0885,  1.8645,  0.7955,  0.3107,  0.0946,  0.0388,  0.0233,  0.0173,  0.0142,  0.0118) t_array=( 81.7714,  90.7337,  103.3303,  125.7748,  177.274,  206.5573,  247.532,  290.2265,  364.842,  482.6189,  674.594,  1122.9524,  1863.482,  2801.4334,  3940.2924,  5031.1954,  7010.5855)
new TCC_Curve.SF21_0_MELTING npts=13 c_array=( 305.8768,  189.1797,  111.6547,  48.0366,  10.7776,  7.358,  5.0601,  3.6541,  1.7608,  1.0534,  0.3094,  0.0722,  0.012) t_array=( 68.2356,  73.3885,  80.0049,  100.2603,  179.5002,  208.2831,  234.2572,  258.0467,  304.7654,  362.1955,  574.1606,  1074.9571,  2556.4261)
new TCC_Curve.SF2_1_CLEARING npts=17 c_array=( 301.4554,  198.8633,  106.8826,  47.0477,  18.7417,  7.6149,  5.8349,  4.584,  3.4617,  1.4242,  0.7988,  0.3075,  0.0647,  0.0315,  0.0193,  0.0143,  0.012) t_array=( 7.3541,  7.8766,  9.4391,  12.7885,  22.7061,  40.273,  46.3435,  49.4302,  51.316,  54.7909,  60.7329,  81.3473,  174.8933,  272.6697,  431.3441,  600.4202,  786.8461)
new TCC_Curve.SF2_1_MELTING npts=17 c_array=( 321.8685,  213.2144,  152.5382,  96.2251,  50.3905,  28.8871,  8.9655,  7.2365,  5.9143,  4.5602,  3.212,  1.7049,  1.2454,  0.8827,  0.4884,  0.0621,  0.0121) t_array=( 6.2788,  6.6553,  7.2252,  8.2798,  10.7161,  14.6095,  30.9235,  35.7703,  39.5672,  42.4226,  44.0868,  45.5314,  47.5148,  52.0687,  60.042,  136.1196,  308.272)
new TCC_Curve.SF32_0_CLEARING npts=14 c_array=( 297.4071,  153.174,  83.2733,  39.9185,  17.1739,  7.0362,  4.6999,  2.7797,  0.5055,  0.0893,  0.0357,  0.022,  0.0161,  0.0119) t_array=( 102.9013,  114.7748,  128.8196,  153.4132,  217.1305,  311.8189,  365.2216,  424.2258,  743.8743,  1597.6361,  2709.7351,  3969.0828,  5819.761,  9667.6448)
new TCC_Curve.SF32_0_MELTING npts=13 c_array=( 309.7181,  191.9543,  114.2389,  35.9381,  12.8485,  8.3014,  5.9267,  4.3202,  1.0105,  0.5685,  0.2195,  0.0603,  0.0117) t_array=( 89.4222,  91.3017,  102.7944,  144.5831,  221.9249,  269.2879,  302.8696,  326.4194,  495.3317,  613.0399,  880.3802,  1559.8737,  3532.6693)
new TCC_Curve.SF3_1_CLEARING npts=16 c_array=( 303.0271,  222.9659,  149.7092,  66.6574,  12.0713,  7.184,  5.6322,  4.4897,  2.1747,  1.2454,  0.4859,  0.1281,  0.038,  0.0242,  0.0163,  0.0116) t_array=( 11.3705,  11.4655,  12.5122,  16.3461,  38.3916,  53.663,  60.4807,  64.9128,  69.3084,  74.3874,  94.4896,  163.972,  330.1751,  477.6256,  707.6513,  1104.4209)
new TCC_Curve.SF3_1_MELTING npts=15 c_array=( 319.8662,  219.9717,  158.6872,  83.9691,  17.4984,  8.3187,  6.5694,  5.0759,  3.9919,  2.2483,  1.5112,  0.9673,  0.4715,  0.0809,  0.0119) t_array=( 9.7687,  9.8914,  10.5502,  12.7222,  27.182,  42.6438,  48.8172,  53.7188,  56.4099,  57.8958,  60.3551,  65.5915,  81.0096,  163.972,  429.5534)
new TCC_Curve.SF3_5_CLEARING npts=18 c_array=( 298.0264,  216.3416,  119.3395,  40.0016,  10.2314,  7.1097,  5.6733,  4.2844,  2.1724,  1.3242,  0.8476,  0.5081,  0.1644,  0.0695,  0.0343,  0.0201,  0.0139,  0.0117) t_array=( 12.3699,  12.7487,  14.3684,  22.4712,  47.2684,  56.4099,  64.5762,  68.8773,  73.0838,  78.2765,  84.7146,  99.1199,  154.5341,  246.5044,  378.367,  607.9605,  962.7511,  1281.5147)
new TCC_Curve.SF3_5_MELTING npts=14 c_array=( 311.6568,  192.7545,  139.7778,  83.1868,  24.1807,  8.1474,  6.1977,  4.5936,  3.3415,  1.8185,  1.3064,  0.6051,  0.1516,  0.0119) t_array=( 10.862,  11.1945,  11.9153,  14.4283,  24.4208,  46.3918,  52.8323,  57.8356,  59.4826,  61.5595,  65.5233,  81.1783,  134.5712,  461.0317)
new TCC_Curve.SF46_0_CLEARING npts=15 c_array=( 293.7185,  148.6232,  65.8307,  25.8181,  12.9424,  7.6228,  4.3563,  2.1883,  1.0414,  0.4779,  0.1062,  0.0438,  0.0255,  0.0175,  0.0131) t_array=( 127.3543,  140.2875,  167.767,  228.4824,  312.7933,  400.6408,  502.0741,  635.7659,  737.7109,  949.8221,  1840.37,  2991.1321,  4653.6728,  6930.8406,  10005.2014)
new TCC_Curve.SF46_0_MELTING npts=14 c_array=( 312.3057,  200.9423,  102.5274,  54.0832,  19.2955,  8.9283,  6.4275,  4.3835,  2.7423,  0.9907,  0.5927,  0.2739,  0.0646,  0.0118) t_array=( 108.6195,  111.1334,  125.2526,  155.3398,  227.2974,  322.0359,  378.7607,  430.4478,  495.8471,  631.1542,  764.2633,  1044.1054,  1873.1975,  4450.1432)
new TCC_Curve.SF4_2_CLEARING npts=17 c_array=( 302.3975,  220.6591,  122.7381,  50.7059,  16.629,  6.877,  5.097,  3.5677,  2.6471,  1.146,  0.7036,  0.2734,  0.0678,  0.0269,  0.0175,  0.0133,  0.0117) t_array=( 15.0725,  15.1668,  17.2904,  23.794,  39.6084,  67.6702,  77.4666,  86.3154,  89.6084,  98.9139,  112.1785,  155.5014,  307.6314,  575.9548,  873.9943,  1256.4402,  1445.8307)
new TCC_Curve.SF4_2_MELTING npts=15 c_array=( 318.5383,  214.5491,  153.493,  88.1755,  42.0055,  7.8154,  5.9452,  4.6079,  3.4153,  1.8898,  1.4109,  0.8938,  0.4267,  0.0473,  0.0118) t_array=( 13.1527,  13.2488,  14.2049,  15.993,  21.6454,  55.6523,  62.8534,  70.3249,  75.0089,  78.8484,  80.5895,  88.7736,  114.6555,  295.4034,  590.5118)
new TCC_Curve.SF5_2_CLEARING npts=17 c_array=( 301.1421,  199.2774,  118.2277,  50.025,  13.862,  7.0362,  5.4252,  4.1962,  3.2422,  1.2185,  0.5065,  0.1803,  0.0602,  0.0269,  0.0184,  0.0143,  0.0117) t_array=( 17.8941,  18.5189,  20.4208,  28.1604,  52.7225,  78.4395,  88.405,  96.0751,  101.098,  118.0434,  148.0832,  226.8251,  394.0292,  722.5248,  987.084,  1371.1413,  1886.8842)
new TCC_Curve.SF5_2_MELTING npts=17 c_array=( 308.7533,  215.8921,  148.0062,  95.8256,  45.6499,  9.6827,  6.5762,  4.7738,  3.345,  2.1815,  1.7335,  1.6253,  1.2134,  0.8267,  0.2398,  0.066,  0.0118) t_array=( 15.5663,  15.6801,  16.7593,  19.0067,  25.0641,  58.4402,  69.4527,  79.7557,  85.5113,  87.9465,  89.4222,  92.5445,  99.5331,  110.7872,  170.582,  304.4486,  723.2766)
new TCC_Curve.SF6_3_CLEARING npts=15 c_array=( 299.2688,  222.5026,  153.493,  75.9904,  19.8244,  7.184,  5.3191,  3.9753,  2.7855,  0.5308,  0.2606,  0.0965,  0.0326,  0.0171,  0.0117) t_array=( 20.9151,  21.2661,  23.2075,  27.7822,  51.4764,  91.3967,  102.4741,  115.4932,  129.7608,  181.9436,  228.4824,  360.317,  702.5183,  1270.8966,  2148.8404)
new TCC_Curve.SF6_3_MELTING npts=14 c_array=( 310.6859,  209.2602,  123.1216,  67.7759,  21.7922,  7.5754,  5.4252,  4.1398,  2.9958,  1.3478,  0.5847,  0.2974,  0.0407,  0.0119) t_array=( 18.4229,  19.1456,  20.9805,  25.1685,  42.1149,  74.6975,  86.2257,  95.8754,  106.716,  121.5314,  148.2373,  183.8457,  444.0896,  818.5652)
new TCC_Curve.SF7_0_CLEARING npts=17 c_array=( 299.8919,  229.5542,  145.5638,  44.4321,  9.097,  6.6657,  4.9405,  3.5345,  2.5498,  1.3978,  0.6771,  0.3437,  0.1566,  0.0517,  0.02,  0.0151,  0.0116) t_array=( 23.3042,  23.377,  25.6975,  37.7188,  83.9254,  99.4296,  112.8807,  127.2219,  138.5476,  151.0385,  181.1883,  217.1305,  299.736,  536.072,  1132.3344,  1581.1066,  2349.8919)
new TCC_Curve.SF7_0_MELTING npts=16 c_array=( 310.0404,  199.4847,  133.2482,  95.1305,  54.7055,  8.1814,  6.243,  5.0286,  3.9836,  2.9896,  2.0559,  1.2034,  0.7567,  0.1792,  0.0519,  0.0117) t_array=( 20.2305,  20.9805,  22.3314,  24.0928,  29.3261,  76.4263,  85.6893,  94.2932,  104.9549,  113.3513,  119.7747,  129.4912,  146.8563,  237.199,  436.7611,  883.1313)
new TCC_Curve.SF7_8_CLEARING npts=16 c_array=( 297.4071,  236.0915,  124.2794,  55.4501,  11.5074,  4.5319,  3.2422,  2.1101,  1.1676,  0.6166,  0.2832,  0.1089,  0.0367,  0.0226,  0.0154,  0.0117) t_array=( 27.8111,  28.1311,  32.9832,  43.4044,  88.1296,  136.8292,  156.9638,  176.3545,  191.6551,  223.0819,  279.2706,  442.7062,  830.5709,  1230.5759,  1867.3621,  2842.5211)
new TCC_Curve.SF7_8_MELTING npts=14 c_array=( 313.6076,  198.6566,  125.8402,  81.4743,  27.338,  7.1542,  4.2006,  2.7855,  1.9783,  1.1061,  0.745,  0.27,  0.0537,  0.0117) t_array=( 23.8188,  25.038,  27.9271,  31.6721,  49.7914,  97.3828,  119.5258,  138.116,  151.9839,  168.1163,  184.037,  254.3167,  532.1835,  1133.5127)
